<?xml version="1.0"?>
<!--
  File:     o-200.xml
  Author:   Aero-Matic v 0.8

  Inputs:
    name:           o-200
    type:           piston
    power:          100.0 hp
    augmented?      no
    injected?       no

O-200: 100 hp (75 kW)
specifications

4-cylinder, horizontally-opposed, air-cooled piston engine
Displacement: 201 cubic inches  (3.3 litres)
Bore x stroke: 4.0625 x 3.875 inches
used by

Aeronca 7EC Champion
Cessna 150

-->

<piston_engine name="o-200">
  <minmp unit="INHG">          6.0 </minmp>
  <maxmp unit="INHG">         30.0 </maxmp>
  <displacement unit="IN3"> 201.00 </displacement>
  <maxhp>        100.00 </maxhp>
  <cycles>         2.0 </cycles>
  <idlerpm>      550.0 </idlerpm>
  <maxthrottle>    1.0 </maxthrottle>
  <minthrottle>    0.2 </minthrottle>
</piston_engine>
