<?xml version="1.0"?>

<propeller name="Fixed-Pitch blabla-inch Two-Blade Propeller">
  <ixx> 1.027 </ixx>
  <!--
  MoI ~ 0.5 * Prop_Weight(lb) (less hub) * [D2]/386
  w=24lb
  d=69inch=5.75ft
  MoI ~ 1.027
  -->
  <!--ixx> 1.47452 </ixx-->
  <diameter unit="IN"> 68.9 </diameter>
  <numblades> 2 </numblades>
  <minpitch> 30 </minpitch>
  <maxpitch> 30 </maxpitch>
  <gearratio>0.84 </gearratio>

  <table name="C_THRUST" type="internal">
     <tableData>
       0.0  0.0197
       0.1  0.0189
       0.2  0.0181
       0.3  0.0167
       0.4  0.0150
       0.5  0.0132
       0.6  0.0107
       0.7  0.0081
       0.8  0.0044
       1.0  -0.0015
       1.2  -0.0078
       1.4  -0.0140
     </tableData>
  </table>

  <table name="C_POWER" type="internal">
     <tableData>
       0.0  0.0229
       0.1  0.0229
       0.2  0.0224
       0.3  0.0219
       0.4  0.0206
       0.5  0.0189
       0.6  0.0173
       0.7  0.0145
       0.8  0.0119
       1.0  0.0042
       1.2  -0.0068
       1.4  -0.0204
       1.6  -0.0347
     </tableData>
  </table>

  <!--table name="C_THRUST" type="internal">
    <tableData>
      0.0   0.068
      0.1   0.068
      0.2   0.067
      0.3   0.066
      0.4   0.064
      0.5   0.061
      0.6   0.057
      0.7   0.050
      0.8   0.040
      0.9   0.029
      1.0   0.019
      1.1   0.008
      1.2   -0.001
      1.3   -0.008
      1.4   -0.019
      1.5   -0.029
      1.6   -0.040
      1.7   -0.050
      1.8   -0.057
      1.9   -0.061
      2.0   -0.064
      2.1   -0.066
      2.2   -0.067
      2.3   -0.068
      5.0   -0.068
    </tableData>
  </table-->

  <!--table name="C_POWER" type = "internal">
    <tableData>
      0.0   0.0580
      0.1   0.0620
      0.2   0.0600
      0.3   0.0580
      0.4   0.0520
      0.5   0.0450
      0.6   0.0421
      0.7   0.0389
      0.8   0.0346
      0.9   0.0280
      1.0   0.0202
      1.1   0.0111
      1.2   0.0075
      1.3   0.0111
      1.4   0.0202
      1.5   0.0280
      1.6   0.0346
      1.7   0.0389
      1.8   0.0421
      1.9   0.0436
      2.0   0.0445
      2.1   0.0445
      2.2   0.0442
      2.3   0.0431
      2.4   0.0424
      5.0   0.0413
    </tableData>
  </table-->

</propeller>
